a := 8
b := 4
c := 1
d := 3
B := [5; 8; 9; 4]
A := [1 + a, 14, -15, 23; 16, 1 + b, -22, 29; 18, 20, -(1 + c), 32; 10, 12, -16, 1 + d]
A = [9, 14, -15, 23; 16, 5, -22, 29; 18, 20, -2, 32; 10, 12, -16, 4]
|A| = 91132  # Рещение существует, определитель системы не равен 0
# Проверка СЛАУ на совместность
rank(A) = 4
rank(augment(A, B)) = 4
# Так как ранги равны, то система имеет едиснтвенное решение
augment(A, B) = [9, 14, -15, 23, 5; 16, 5, -22, 29, 8; 18, 20, -2, 32, 9; 10, 12, -16, 4, 4]  # Расширенная матрица системы линейных уравнений
ORIGIN := 1
# Метод Зейделя.
Zeidel(A, B, ε) :=
    n ← rows(B)
    C[:, 1] ← B
    δ ← 1
    k ← 1
    while δ > ε and k < 10
        δ ← 0
        for i ∈ 1 .. n
            C[i, k + 1] ← 0
            for j ∈ 1 .. n
                C[i, k + 1] ← C[i, k + 1] + A[i, j]*C[j, k] if i ≠ j
            C[i, k + 1] ← (B[i] - C[i, k + 1])/A[i, i]
            δ ← δ + |C[i, k + 1] - C[i, k]|
        k ← k + 1
    C
n := cols(A) = 4  # Порядок системы
E := identity(n) = [1, 0, 0, 0; 0, 1, 0, 0; 0, 0, 1, 0; 0, 0, 0, 1]  # Еденичная матрица n x n
C := A + E = [10, 14, -15, 23; 16, 6, -22, 29; 18, 20, -1, 32; 10, 12, -16, 5]
n = 4
nC := norme(C) = 70.2922
# Условие сходимости: nС<1  nC=70.292
# Условие сходимости не выполняется
# Данную СЛАУ невозможно решить используя метод Зейделя
# .
# Метод Холецкого
Холецкий(A, B, n) :=
    for i ∈ 1 .. n
        D[i, 1] ← A[i, 1]
        C[1, i] ← A[1, i]/D[1, 1]
        C[i, i] ← 1
    for i ∈ 2 .. n
        for j ∈ 2 .. n
            if i ≥ j
                S ← 0
                for k ∈ 1 .. j - 1
                    S ← S + D[i, k]*C[k, j]
                D[i, j] ← A[i, j] - S
            otherwise
                S ← 0
                for k ∈ 1 .. i - 1
                    S ← S + D[i, k]*C[k, j]
                C[i, j] ← (A[i, j] - S)/D[i, i]
    y[1] ← B[1]/D[1, 1]
    for i ∈ 2 .. n
        S ← 0
        for k ∈ 1 .. i - 1
            S ← S + D[i, k]*y[k]
        y[i] ← (B[i] - S)/D[i, i]
    x[n] ← y[n]
    for i ∈ n - 1 .. 1
        S ← 0
        for k ∈ i + 1 .. n
            S ← S + C[i, k]*x[k]
        x[i] ← y[i] - S
    x
X1 := Холецкий(A, B, 4) = [0.370188; 0.00190932; 0.000768117; 0.0718738]
|A*X1 - B| = 0
εX_подстан := |A*X1 - B| = 0
# Проверка решения:
|A*X1 - B| = 0
# Полученнная оценка точности решения СЛАУ удовлетворяет с большим превышением требуемый  уровень: εX_подстан << 0,00001.
# Проверим решение встроенной функцией МСАД - lsolve ,а затем сравним с результатом основе метода Холецкого
X3 := lsolve(A, B) = [0.370188; 0.00190932; 0.000768117; 0.0718738]
X3 - X1 = [0; -1.6263e-17; 1.48536e-17; -1.38778e-17]
|A*X3 - B| = 2.03507e-15
# Метод Крамера
ORIGIN := 1
Крамер(A, B) :=
    for i ∈ 1 .. rows(A)
        S ← A
        S[:, i] ← B
        x[i] ← |S|/|A|
        x
X := Крамер(A, B) = [0.370188; 0.00190932; 0.000768117; 0.0718738]
# Оценка точности решения
|A*X - B| = 0
# Полученное значение точности меньше требуемого по условию ε=0,00001. Вычисления в MathCAD ограничены точностью 10^-15 и так как полученная точность имеет больший порядок, MathCAD округляет ее до нуля.
# В MathCAD нет встроенной функции, работающей по методу Крамера, для проверки решения воспользуемся встроенными операциями над матрицами.
D1 := det([5, 14, -15, 23; 8, 5, -22, 29; 9, 20, -2, 32; 4, 12, -16, 4])
D2 := det([9, 5, -15, 23; 16, 8, -22, 29; 18, 9, -2, 32; 10, 4, -16, 4])
D3 := det([9, 14, 5, 23; 16, 5, 8, 29; 18, 20, 9, 32; 10, 12, 4, 4])
D4 := det([9, 14, -15, 5; 16, 5, -22, 8; 18, 20, -2, 9; 10, 12, -16, 4])
x1 := D1/|A|
x2 := D2/|A|
x3 := D3/|A|
x4 := D4/|A|
x1 = 0.370188
x2 = 0.00190932
x3 = 0.000768117
x4 = 0.0718738
x := [x1; x2; x3; x4]
x = [0.370188; 0.00190932; 0.000768117; 0.0718738]
# Оценка точности решения методом подстановки результата:
|A*x - B| = 0
ε_подстан := |A*x - B|
# Вычисления в MathCAD ограничены точностью 10^-15 и так как полученная точность имеет больший порядок, MathCAD округляет ее до нуля!
# Полученнная характеристика точности решения СЛАУ удовлетворяет с большим превышением требуемый  уровень: ε_подстан << 0,00001.
