# Вариант 10
# Исходная система уравнений:
#
# sin(x+y) -1.2x= 0.1
# x^2 + y^2 = 1
#
# Используемые методы: метод простых итераций, метод Зейделя, метод Ньютона решить с точностью  не ниже 0,00001.
# Решение:
f1(x, y) := sin(x + y) - 1.2*x - 0.1
f2(x, y) := x^2 + y^2 - 1
f1(x, y) solve, y → [asin(1.2*x + 0.1) - 1.0*x; 3.14159265359 - 1.0*asin(1.2*x + 0.1) - 1.0*x]
f2(x, y) solve, y → [sqrt(x - 1)*sqrt(x + 1)*1i; -sqrt(x - 1)*sqrt(x + 1)*1i]
# Решим систему нелинейных уравнений графически
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# С помощью режима трассировки найдем корень данной системы нелинейных уравнений.
# В качестве ожидаемых значений приняты x=0.7 y=0.7; и x=-0.9 y=-0.5
x0 := 0.7
y0 := 0.7
ε := 0.00001
# Проверим с помощью функции Mathcad "Find":
x := x0
y := y0
Given
sin(x + y) - 1.2*x - 0.1 == 0
x^2 + y^2 - 1 == 0
z := Find(x, y)
z = [0.7396; 0.673046]
# Проверка решения
ORIGIN = 0
f1(z[0], z[1]) = 8.32667e-17
f2(z[0], z[1]) = 0
xo := z[0]  # Это решение будет использовано для оценки точности последующих решений
yo := z[1]
# Метод простых итераций
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Iter(Φ, x0, y0, ε) :=
    x[0] ← x0
    y[0] ← y0
    k ← 0
    while sqrt((x[k] - Φ(x[k], y[k])[0])^2 + (y[k] - Φ(x[k], y[k])[1])^2) > ε and k < 100
        [x[k + 1]; y[k + 1]] ← Φ(x[k], y[k])
        k ← k + 1
    [x[k - 1]; y[k - 1]; k]
Φ(x, y) := [(sin(x + y) - 0.1)/1.2; sqrt(1 - x^2)]
# Результат
z1 := Iter(Φ, x0, y0, ε) = [0.739597; 0.673008; 9]
# Проверка точности решения
ф1 := d/dx(sin(x + y)/1.4)
x1 := z1[0] = 0.739597
Δx := x1 - xo = -3.30434e-6
ф2 := d/dy(sin(x + y)/1.4)
y1 := z1[1] = 0.673008
Δy := y1 - yo = -3.84614e-5
k1 := z1[2] = 9
ф3 := d/dx(sqrt(1 - x^2))
z = [0.7396; 0.673046]
ф4 := d/dy(sqrt(1 - x^2))
ф1 + ф2 + ф3 + ф4 = -0.737386
-1 < -0.737 < 1
# Метод Зейделя
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Zeidel(f1, f2, x0, y0, ε, Kmax) :=
    X[0] ← x0
    Y[0] ← y0
    ind ← 0
    for k ∈ 0 .. Kmax
        v ← X[k]
        X[k + 1] ← root(f1(v, Y[k]), v)
        v ← Y[k]
        Y[k + 1] ← root(f2(X[k + 1], v), v)
        Δx ← |X[k + 1] - X[k]|
        Δy ← |Y[k + 1] - Y[k]|
        Δ ← max(Δx, Δy)
        if (Δ < ε)
            W[0] ← X[k + 1]
            W[1] ← Y[k + 1]
            W[2] ← k + 1
            ind ← 1
            break
    return W if ind == 1
    return "Решения нет" otherwise
Kmax := 10
z2 := Zeidel(f1, f2, x0, y0, ε, Kmax) = [0.7396; 0.673047; 6]
x2 := z2[0] = 0.7396
Δx := x2 - xo = -4.64981e-7
y2 := z2[1] = 0.673047
Δy := y2 - yo = 5.09173e-7
k2 := z2[2] = 6
## Метод Ньютона
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F(x, y) := [sin(x + y) - 1.2*x - 0.1; x^2 + y^2 - 1]
F0x(x, y) := d/dx(F(x, y)[0, 0])
F0y(x, y) := d/dy(F(x, y)[0, 0])
F1x(x, y) := d/dx(F(x, y)[1, 0])
F1y(x, y) := d/dy(F(x, y)[1, 0])
Newton(x0, y0, ε) :=
    x[0] ← x0
    y[0] ← y0
    k ← 0
    while k > -1
        [x[k + 1]; y[k + 1]] ← [x[k]; y[k]] - [F0x(x[k], y[k]), F0y(x[k], y[k]); F1x(x[k], y[k]), F1y(x[k], y[k])]^-1*F(x[k], y[k])
        k ← k + 1
        break if (x[k] - x[k - 1])^2 + (y[k] - y[k - 1])^2 < ε
    [x[k]; y[k]; k]
z3 := Newton(x0, y0, 0.0001) = [0.739602; 0.673046; 2]
x3 := z3[0] = 0.739602
Δx := x3 - xo = 1.27134e-6
y3 := z3[1] = 0.673046
Δy := y3 - yo = 4.58687e-9
k3 := z3[2] = 2
