f(x) := 0.5*x + log(x, 10) - 1
ε := 0.0001
xm := 1.5
Given
f(xm) == 0
Find(xm) = 1.59466
# Первая производная функции
f1(x) := 0.5 + 1/(x*ln(10))
# Вторая производная функции
f2(x) := -1/(x^2*ln(10))
# Определим функцию φ(x)=x, которая потребуется для метода простых итераций
φ(x) := 2 - 2*log(x, 10)
φ1(x) := -2/(x*ln(10))
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# Из построенных графиков видно, что корень уравнения один и принадлжеит отрезку [1.5, 2]
a := 1.5
b := 2
# Общие замечания по применимости методов вычислительной математики:
# f(x)=0 - нелинейное уравнение
# f(x) определена на [1.5,2] и непрерывно дифференцируема на нем
# f(x) меняет знак на концах отрезка (f(1.5)<0, f(2)>0)
# Значит, предложенные в задании методы применимы к данной задаче.
f(a) = -0.0739087
f(b) = 0.30103
# Следовательно f(a)*f' ' ' (x) > 0
# Зададим число допустимых итераций
N := 50
# Уточнение корня методом хорд
c := a
c := b  # disabled
Задаем последовательность приближенных значений корня
U :=
    t[0] ← b
    t[1] ← c - f(c)*(t[0] - c)/(f(t[0]) - f(c))
    k ← 1
    while |t[k] - t[k - 1]| - ε ≥ 0 and k < N + 2
        t[k + 1] ← c - f(c)*(t[k] - c)/(f(t[k]) - f(c))
        k ← k + 1
    error("k>N") if k > N + 2
    t
i := 0 .. last(U)
transpose(U) = [2, 1.59856, 1.5947, 1.59466]
last(U) = 3
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'
# Уточнение корня методом Ньютона
V :=
    t[0] ← a
    t[1] ← t[0] - f(t[0])/f1(t[0])
    k ← 1
    while |t[k] - t[k - 1]| - ε ≥ 0 and k < N + 2
        t[k + 1] ← t[k] - f(t[k])/f1(t[k])
        k ← k + 1
    error("k>N") if k > N + 2
    t
j := 0 .. last(V)
transpose(V) = [1.5, 1.59361, 1.59466, 1.59466]
last(V) = 3
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# В качестве значения корня берем последнее значение последовательности V и заносим его в массив R. Число затраченных итераций (last(V)) заносим в массив Т.
R[1] := V[last(V)]  # Оценка погрешности
-f(V[last(V)])/1.217 = 1.00349e-15
R = [0; 1.59466]
T[1] := last(V)
# Уточнение корня методом простых итераций
f1(1.5) = 0.78953
f1(2) = 0.717147
Iter(f, C, x0, ε) :=
    x2 ← x0
    while 1
        x1 ← x2
        x2 ← x1 - 1/C*f(x1)
        break if |x1 - x2| < ε
    x2
Iter(f, 0.75, 1.75, 0.0001) = 1.59466
# [component: outputs k]
# [component: outputs Z]
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# Ращиков ЧислМет Прат ИТМО 2010 стр. 15
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